# AguaClara Design Tool
# [reference: BasicClientInputs.xmcd]
Ti_wanted := 5 min
# [reference: ExpertInputs.xmcd]
Q_Plant = 0.005 m^3/s
# [reference: DesignAssumptions.xmcd]
# [reference: MathFunctions.xmcd]
# [reference: PipeDatabase.xmcd]
# [reference: MinorLossCoefficients.xmcd]
# [reference: FluidsFunctions.xmcd]
# [reference: ChemStorageTanks.xmcd]
# [reference: ChemStorageCylinders.xmcd]
# [reference: Sedimentation Tank.xmcd]
# [reference: Floc Hopper - New Design.xmcd]
# [reference: FCM.xmcd]
# [reference: Flocculator 3.xmcd]
HW_FlocEnd = 1 m
# [reference: RapidMixer.xmcd]
# [reference: EntranceTankDim.xmcd]
# [reference: Materials List.xmcd]
Q_Plant = 0.005 m^3/s
EN_FlocHoriz = 0
# [reference: AutoCADMasterProgram.xmcd]
# This file must have at least one variable displayed otherwise it doesn't recalculate and it claims that all variables are undefined.
Q_Plant = 0.005 m^3/s
EN_DrillSeries = 0
EN_PipeSpec = 2
L_Sed = 3.07538 m
EN_FcmTube = 0
AC_SedTank =  # no stored result
AC_ChemTanks = ["-layer m alumtanks"; "c t 132,132,132"; "alumtanks"; "  "; "_-view o t"; "_cylinder 1.39279,3.85222,2.19556 0.36778 1.09335"; "_cylinder 1.39279,3.85222,2.20056 0.36278 1.08835"; "_subtract 1.02501,3.85222,2.19556  1.03001,3.85222,2.19556 "; "_mirror all  1.38279,2.98443 1.40279,2.98443 "; "_union all "; "-layer s 0"; "  "; "-layer f alumtanks"; "  "]
AC_FlocTank = [
    "-layer m floctank";
    "c t 91,91,91";
    "floctank";
    "  ";
    "_-view o t _zoom w 0.16,2.3,0.62412 -3.23538,5.23,1.86969 _box 0,2.46,0.62412 -3.07538,5.07,1.86969 _box 0.15,2.31,0.47412 -3.22538,5.22,1.86969 _subtract 0.15,2.31,0.47412  0,2.46,0.62412 ";
    "_box -3.22538,3,0.62412 0.15,3.15,1.86969";
    "_box -0.03851,3,1.86522 0,3.15,0.62412";
    "_subtract -3.22538,3,0.62412  -0.03851,3,1.86522 ";
    "_box -3.22538,3.69,0.62412 0.15,3.84,1.86969";
    "_box -3.07538,3.69,1.86522 -3.03687,3.84,0.62412"
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]
# [component: inputs AC_SedTank]
# [component: inputs AC_FlocTank]
# [component: inputs AC_ChemTanks]
