# AguaClara Water Treatment Plants
# Automated Design
# Add variable descriptions next to every varible so it is easy to interpret what this all means.
# Design References
# [reference: BasicInputs- hmr6_Gracias.xmcd]
# Use BasicClientInputs and ExpertClientInputs when this is run by LabVIEW.
# Use BasicInputs and ExpertInputs to use the program in MathCAD
# Change the reference by
# - right clicking
# - select properties
# - reference tab
# - type in the correct file name
B_SedPlateFramePipes = 0.3 m
# [reference: DesignAssumptions.xmcd]
# [reference: MathFunctions.xmcd]
# [reference: PipeDatabase.xmcd]
Q_Plant = 0.1 m^3/s
# [reference: MinorLossCoefficients.xmcd]
# [reference: FluidsFunctions.xmcd]
# [reference: Sedimentation Tank.xmcd]
# [reference: Floc Hopper - New Design.xmcd]
# [reference: FCM.xmcd]
# [reference: Flocculator 3 jmp235 1.xmcd]
# [reference: RapidMixer.xmcd]
# [reference: EntranceTankDim.xmcd]
# [reference: Materials List.xmcd]
W_SedBay = 1 m
N_SedTanks = 4
W_ExitChannelMin = 0.254 m
W_SedBay = 1 m
N_SedBays = 5
# Sed Tanks and Slopes:
Geom_ExitChannel = 1
B_SedPort =  # error: This variable is undefined.  # Height of the narrowest part of the manifold ports
N_SedTanks = 4
W_SedPort =  # error
H_SedBetween = 22.9724 cm  # Distance from the top of the inlet manifold to the bottom of the ledge supporting the lamella frame
A_SedPort =  # error  # Port Area
L_Sed = 6.17143 m
W_SedSludgeFlat =  # error  # Distance between tips of manifold plates (space alloted for the drain holes
N_SedBays = 5  # Number of bays of inlet manifolds in each sed tank
AN_SedTopInlet =  # error  # Angle of the top of the inlet manifold
L_SedPort =  # error  # Length of the port through which water exits the inlet manifold
AN_SedBottom =  # error  # Angle of the bottom of inlet manifold
W_SedSlopePlate =  # error  # Width of ferrous cement plates in whice one manifold port is cut
Q_SedBay = 5 L/s
W_SedBayActual =  # error
L_SedSlopeManifold =  # error  # This is the extra distance between the last slope and the wall
# Sedimentation Tank Sludge Drain:
N_SedSludgeOrifices = 73  # per cell
Ti_SludgeDrain = 10 min  # Tank Drain time
W_SedSludge = 18.7449 cm  # Width of the sludge channel
B_SedSludgeOrifices = 8.4308 cm  # Distance center to center between drain orifices
H_SedSludge = 9.37246 cm  # Depth of the sludge channel
T_SedSludge = 7.18623 cm
T_SedSludge = 7.18623 cm
# Thickness of the plate topping the sludge channel
# through which drain holes are formed
W_SedDrainCover = 28.7449 cm
D_SedSludgeOrifice = 0.015 m  # Diameter of drain orifices
W_SedInletBottom = 0.356275 m
N_SedSludgeOrifices = 73
ND_SedSludgeValve = 4 in
# Sedimentation Tank Dimensions:
Z_SedSludge = 0.165587 m  # Height from 0 of the top of the sludge drain
H_SedBottomSlope =  # error  # Height of the bottom slope
H_SedTopSlope =  # error  # Height of the top of the inlet manifold
Z_SedSlopes = 0.739373 m  # Height from 0 of the top of the inlet manifold
W_Sed = 5 m  # Total tank wall height
L_Sed = 6.17143 m  # Total tank length
# Inlet Channel:
HW_InletChannel = 0.631368 m  # Width of the drop chimneys connecting channel to sed inlet manifolds
W_InletChannel = 0.965496 m  # length of drop chimmneys
L_Channel = 20.75 m
W_SedManifoldEntrance =  # error
L_SedManifoldEntrance =  # error
H_SedManifoldPort =  # error  # Ports at bottom of inlet chimney are set to be triangles
W_SedManifoldPort =  # error
N_SedInletPipes = 2  # per sed bay
H_InletChannel = 0.731368 m
# Sedimentation Tank Effluent Launder:
N_SedLaunderOrifices = 74  # Number of orifices per launder
Q_SedLaunderOrifices = 3.38384e-5 m^3/s  # More Launder Dimensions
ND_SedLaunder = 4 in
B_SedLaunderOrifices = 0.1 m  # Center to center launder spacing
L_SedLaunder = 4.45285 m
# Exit Channel:
D_SedLaunderOrifice = 0.354331 in
W_ExitChannel = 0.603084 m
H_ExitChannel = 0.731368 m
L_ExitChannel = 20.75 m
H_PltWeir = 0.467701 m  # height of the weir carrying water to the distribution tank
HW_ExitChannel = 0.591368 m  # water height in exit channel from 0
# Lamella:
L_SedPlate = 0.522514 m
B_SedPlate = 2.2397 cm  # center to center distance between lamella
S_SedPlate = 2 cm  # spacing between lamella
N_SedPlates = 153  # Number of Sed Plates per Sedimentation Tank Bay.
AN_SedPlate = 60 deg
ZW_ExitChannel =  # error
V_SedC = 10.293 m/day
L_SedActive = 3.9387 m
T
V_SedUp = 70 m/day
Z_SedLaunder = 1.54556 m
H_SedPlate = 0.452511 m
H_SedAbove = 0.150645 m  # Height of water needed above the lamella
N_SedPlates = 153
HW_Sed = 1.63905 m
H_Sed = 1.73905 m
Z_Mp = 1.00769 m
N_SedPorts =  # error
H_SedBayDivider = 0.969097 m
W_SedSlopePlateRemaining =  # error
W_SedBayDivider =  # error
# Sedimentation Tank Floc Hopper:
A_FlocHopper =  # error
L_FlocHopper =  # error  # Length of the hopper cement plate
L_FlocHopperOffset = 0.261257 m  # distance from the edge of the channel to the bottom of the first lamella (collection distance)
W_FlocHopper =  # error  # width of the hopper set within each bay
# Flow Controller:
N_Fcm = 11
ID_FcmTube = 4.318 mm
ID_FcmTube = 0.17 in
L_FcmTube = 236.097 cm
Q_FcmTubeMax = 409.091 mL/min
HL_FcmValve = 31.0927 cm
# Flocculator: | Look at Flocculator Positioning arrays
W_FlocChannel = 1.87048 m
# Fill last channel with bafffles from last channel
# Fix port width to be based on energy dissipation in that channel
ED_Floc = 6 mW/kg
# Adjust spacing after the number of baffles per channel is known.
# Check the residence time of the flocculator should be at least 20minutes
HW_FlocEnd = 1.63905 m
X_FlocBaffles = [
    0.623492, 0.623492, 0.623492, 0.623492, 0.623492, 0.623492, 0.631368;
    1.31698, 1.31698, 1.31698, 1.31698, 1.31698, 1.31698, 1.32373;
    2.01048, 2.01048, 2.01048, 2.01048, 2.01048, 2.01048, 2.0161;
    2.70397, 2.70397, 2.70397, 2.70397, 2.70397, 2.70397, 2.70847;
    3.39746, 3.39746, 3.39746, 3.39746, 3.39746, 3.39746, 3.40084;
    4.09095, 4.09095, 4.09095, 4.09095, 4.09095, 4.09095, 4.0932;
    4.78444, 4.78444, 4.78444, 4.78444, 4.78444, 4.78444, 4.78557;
    5.47794, 5.47794, 5.47794, 5.47794, 5.47794, 5.47794, 5.47794
] m
L_FlocBaffles = [
    1.24698, 1.24698, 1.24698, 1.24698, 1.24698, 1.24698, 1.24698;
    1.24698, 1.24698, 1.24698, 1.24698, 1.24698, 1.24698, 1.24698;
    1.24698, 1.24698, 1.24698, 1.24698, 1.24698, 1.24698, 1.24698;
    1.24698, 1.24698, 1.24698, 1.24698, 1.24698, 1.24698, 1.24698;
    1.24698, 1.24698, 1.24698, 1.24698, 1.24698, 1.24698, 1.24698;
    1.24698, 1.24698, 1.24698, 1.24698, 1.24698, 1.24698, 1.24698;
    1.24698, 1.24698, 1.24698, 1.24698, 1.24698, 1.24698, 1.24698;
    1.24698, 1.24698, 1.24698, 1.24698, 1.24698, 1.24698, 1.24698
] m
Z_FlocBaffles = [
    0, 0, 0, 0, 0, 0, 0;
    0, 0, 0, 0, 0, 0, 0;
    0, 0, 0, 0, 0, 0, 0;
    0, 0, 0, 0, 0, 0, 0;
    0, 0, 0, 0, 0, 0, 0;
    0, 0, 0, 0, 0, 0, 0;
    0, 0, 0, 0, 0, 0, 0;
    0, 0, 0, 0, 0, 0, 0
] m
N_FlocChannels = 7
L_FlocTank = 43.2 m
HL_Floc = 22.0526 cm
HW_FlocStart = 1.85958 m
S_FlocBaffle = [62.3492; 62.3492; 62.3492; 62.3492; 62.3492; 62.3492; 62.2367] cm
B_FlocBaffle = [69.3492; 69.3492; 69.3492; 69.3492; 69.3492; 69.3492; 69.2367] cm
N_FlocChannelBaffles = [8; 8; 8; 8; 8; 8; 8]
W_FlocPort = [0.623492; 0.623492; 0.623492; 0.623492; 0.623492; 0.623492; 0.623492] m
HL_FlocChannels = [3.15038; 3.15038; 3.15038; 3.15038; 3.15038; 3.15038; 3.15038] cm
L_FlocBaffleLower = 1.24698 m
L_FlocBaffleUpper = 1.24698 m
H_FlocPort = [1.95958; 1.95958; 1.95958; 1.95958; 1.95958; 1.95958; 1.95958] m
Ti_Floc = 19.3428 min  # residence time of the flocculator
N_FlocBaffles = 56
# Rapid Mix Unit and Entrance Tank:
L_Et = 3.51324 m
W_Et = 3.51324 m
H_Et = 2.25958 m  # Height of Entrance Tank Orifice
W_EtOrifice[30] = 0.031 m
L_trueET[30] = 2.58528 m  # Length of Entrance Tank Orifice
Pi_EtFlow[30] = 0.278388  # Ratio of the minimum flow divided by the maximum flow through the plant.
L_FlocEntryOrifice = 187.048 cm  # Length of orifice entering into flocculator from Rapid Mix Unit
W_FlocEntryOrifice = 35.9755 cm  # Height of orifice entering into flocculator
ED_Diffusion =  # error  # Minimum Energy Dissipation needed
HL_FlocEntryOrifice = 0.168038 cm  # Head loss caused by entering flocculation tank.
A_FlocEntry = 0.672914 m^2
A_EtOrifice = 801.436 cm^2
HW_EtTotal =  # error  # Total Height of water at beginning of rapid mix unit
HW_Channel2 =  # error  # Height of water at the back of the entrance tank channel (from channel bottom)
HW_EtChannel = 8.96436 cm  # Height of Waterfall into flocculator
W_EtChannel = 62.3492 cm  # Widt of entrance tank channel
Vol_Stock = 8100 L  # Volume of chemical stock tanks
ZW_ExitChannel =  # error  # Water Level at the end of the plant in the exit channel and exit channel box
HW_Sed = 1.63905 m
HW_FlocStart = 1.85958 m  # Water level at the beginning of the floc tank
HL_Floc = 22.0526 cm  # just for ref. the head loss throught the floc tank
HW_EtTotal =  # error  # Height of the water in the entrance channel
# Materials List:
L_LaunderPipe =  # error
N_Launders = 40
L_LaunderPipeTotal = 178.114 m
N_Valves = 20
N_LaunderCouplings = 40
N_ValveCouplings = 20
N_SedPlatesTotal = 3060
N_SedPlatesPerSheet = 6
N_SedPlateSheets = 510
N_PipeSedPlateStand =  # error
A_SedTank =  # error
# [reference: AutoCADMasterProgram.xmcd]
# AutoCAD References
AC_SedTank = [
    "_-view o t"; "-layer m tank"; "c t 132,132,132"; "tank"; "  "; "_-view o t _zoom w 0.16,-0.16,0 -3.24571,2.16,1.5674 _box 0,0,0 -3.08571,2,1.5674 _box 0.15,-0.15,-0.15 -3.23571,2.15,1.5674 _subtract 0.15,-0.15,-0.15  0,0,0 "; "-layer s 0"; "  "; "-layer f tank"; "  "
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]
AC_EntranceTank = [
    "-layer m entrancetank";
    "c t 214,214,214";
    "entrancetank";
    "  ";
    "_-view o t _zoom w 0.16,8.04,0 -1.27098,9.47098,2.01922 _box 0,8.2,0 -1.11098,9.31098,2.01922 _box 0.15,8.05,-0.15 -1.26098,9.46098,2.01922 _subtract 0.15,8.05,-0.15  0,8.2,0 ";
    "-layer s 0";
    "  ";
    "-layer f entrancetank";
    "  ";
    "-layer s entrancetank";
    "  ";
    "_box -1.11098,8.05,1.96922 -0.92772,8.2,2.01922";
    "-layer s 0";
    "  ";
    "-layer t entrancetank";
    "  ";
    "_-view o t";
    "_subtract 0.15,8.2,0  -1.11098,8.05,1.96922 ";
    "-layer f entrancetank";
    "  "
]
AC_FlocTank = [
    "-layer m floctank";
    "c t 91,91,91";
    "floctank";
    "  ";
    "_-view o t _zoom w 0.16,4.14,0 -3.24571,8.21,1.71922 _box 0,4.3,0 -3.08571,8.05,1.71922 _box 0.15,4.15,-0.15 -3.23571,8.2,1.71922 _subtract 0.15,4.15,-0.15  0,4.3,0 ";
    "_box -3.23571,4.8,0 0.15,4.95,1.71922";
    "_box -0.13327,4.8,0.6876 0,4.95,0";
    "_subtract -3.23571,4.8,0  -0.13327,4.8,0.6876 ";
    "_box -3.23571,5.45,0 0.15,5.6,1.71922";
    "_box -3.08571,5.45,0.6876 -2.95245,5.6,0"
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]
